# OpenSim document version 40000
MarkerSet:
  Marker C7: torso (-0.08 0.42 0.003)
  Marker rshoulder: torso (0 0.418 0.142)
  Marker lshoulder: torso (0 0.418 -0.142)
  Marker sternum: torso (0.046 0.385 0)
  Marker r_ASIS: pelvis (0.028 0.01 0.128)
  Marker l_ASIS: pelvis (0.028 0.01 -0.128)
  Marker r_PSIS: pelvis (-0.154 0.025 0.05)
  Marker l_PSIS: pelvis (-0.154 0.025 -0.05)
  Marker r_knee: femur_r (0.008 -0.404 0.055)
  Marker r_mknee: femur_r (0.011 -0.401 -0.055)
  Marker r_ankle: tibia_r (-0.01743173 -0.3850714 0.04727037)
  Marker r_mankle: tibia_r (0.006 -0.38 -0.038)
  Marker r_toe: calcn_r (0.1804591 0.01762133 0.001004512)
  Marker r_5meta: calcn_r (0.1358638 0.001114828 0.06143212)
  Marker l_knee: femur_l (0.008 -0.404 -0.055)
  Marker l_mknee: femur_l (0.011 -0.401 0.055)
  Marker l_ankle: tibia_l (-0.017 -0.385 -0.047)
  Marker l_mankle: tibia_l (0.006 -0.38 0.038)
  Marker l_toe: calcn_l (0.1804591 0.01762133 -0.001004512)
  Marker l_5meta: calcn_l (0.1358638 0.001114828 -0.06143212)
  Marker r_melbow: humerus_r (0.005511308 -0.2781543 -0.04596903) fixed=true
  Marker r_lelbow: humerus_r (0.01046536 -0.2731899 0.04165469) fixed=true
  Marker r_lwrist: radius_r (-0.02965623 -0.2244783 0.03462701) fixed=true
  Marker r_mwrist: radius_r (-0.02980336 -0.2253365 -0.01089353) fixed=true
  Marker l_melbow: humerus_l (0.005511308 -0.2781543 0.04596903) fixed=true
  Marker l_lelbow: humerus_l (0.01046536 -0.2731899 -0.04165469) fixed=true
  Marker l_lwrist: radius_l (-0.0354783 -0.2265841 -0.03585613) fixed=true
  Marker l_mwrist: radius_l (-0.04018316 -0.2267243 0.005623399) fixed=true
